// COMSOL Multiphysics 5.6.0.341 model "PointForceAl.mph"
// Outline of the model tree

Parameters
  w0 = 30 [mm]
  h0 = 30[mm]
  a = 2 [mm]
  pml = 5 [mm]
  frc = -1
  frq = 200[kHz]

Coordinate systems
  pml1: PML "Perfectly Matched Layer 1" on domains 1-3, 5, 6

Geometry
  geom1 "Geometry 1" (2D, length unit m)
    r1: Rectangle
      pos = {0, -h0/2}
      base = center
      layername = Layer 1
      layer = pml
      layerleft = on
      layerright = on
      size = {w0, h0}
    pt1: Point
    fin: Finalize "Form Union"

Materials
  mat1: Common "Aluminum 3003-H18" on all domains
    def "Basic"
      relpermeability = 1
      electricconductivity = 2.326e7[S/m]
      thermalexpansioncoefficient = 23.2e-6[1/K]
      heatcapacity = 893[J/(kg*K)]
      relpermittivity = 1
      density = 2730[kg/m^3]
      thermalconductivity = 155[W/(m*K)]
    Enu "Young's modulus and Poisson's ratio"
      youngsmodulus = 69e9[Pa]
      poissonsratio = 0.33

Physics
  solid: SolidMechanics on all domains
    dependent variable u = {u, v, w}
    lemm1: LinearElasticModel "Linear Elastic Material 1" (default)
      IsotropicOption = Lame
      lambLame_mat = userdef
      lambLame = 55.5e9
      muLame_mat = userdef
      muLame = 26.1e9
      rho_mat = userdef
      rho = 2730
    free1: Free (default)
    init1: init "Initial Values 1" (default)
    pl1: PointLoad on points 7 | Fp = {0, 1, 0}

Mesh
  mesh1 "Mesh 1" (physics-controlled)
    size: MeshSizeDefault | hauto = 2

Studies
  std1 "Study 1"
    freq: Frequency "Frequency Domain" | plist = frq

Solver configurations
  sol1 "Solution 1" (study std1)
    v1: Variables "Dependent Variables 1"
    s1: Stationary "Stationary Solver 1"
      dDef: Direct
      p1: Parametric | pname = freq; plistarr = frq; punit = Hz; pcontinuationmode = no
      fc1: FullyCoupled | linsolver = dDef

Datasets
  dset1: Solution | solution = sol1

Plots
  pg1: PlotGroup2D "Stress (solid)" | data = dset1
    surf1: Surface | expr = solid.disp
  pg2: PlotGroup2D "Boundary Loads (solid)" | data = dset1
    arwl1: ArrowLine "Boundary Load 1" | expr = {solid.bndl1.F_Ax, solid.bndl1.F_Ay}
      col: Color "Color Expression" | expr = solid.bndl1.F_A_Mag
      def: Deform "Deformation" | expr = {u, v}; descr = Displacement field
    surf1: Surface "Gray Surfaces" | expr = 1
      def: Deform "Deformation" | expr = {u, v}; descr = Displacement field
      sel1: Selection on domains 1-6
  pg3: PlotGroup1D "1D Plot Group 3" | data = dset1
    lngr1: LineGraph on boundaries 11 | expr = abs(u); xdata = expr; xdataexpr = x

Exports
  plot1: Plot | filename = C:\Users\gpesc\Desktop\Course work 2\Comsol\LineGraph.txt